x1 := 24000
y1 := 11000
x2 := 25000
y2 := 12500
x3 := 54050
y3 := 64800
x4 := 12400
y4 := 67842
x5 := 55200
y5 := 64500
x6 := 65740
y6 := 11000
x7 := 30000
y7 := 24500
x8 := 38000
y8 := 30000
d12 := sqrt(|x1 - x2|^2 + |y1 - y2|^2) = 1802.78
d13 := sqrt(|x1 - x3|^2 + |y1 - y3|^2) = 61623.4
d14 := sqrt(|x1 - x4|^2 + |y1 - y4|^2) = 58013.6
d15 := sqrt(|x1 - x5|^2 + |y1 - y5|^2) = 61932.9
d16 := sqrt(|x1 - x6|^2 + |y1 - y6|^2) = 41740
d17 := sqrt(|x1 - x7|^2 + |y1 - y7|^2) = 14773.3
d18 := sqrt(|x1 - x8|^2 + |y1 - y8|^2) = 23600.8
d23 := sqrt(|x2 - x3|^2 + |y2 - y3|^2) = 59826.4
d24 := sqrt(|x2 - x4|^2 + |y2 - y4|^2) = 56758.2
d25 := sqrt(|x2 - x5|^2 + |y2 - y5|^2) = 60133.5
d26 := sqrt(|x2 - x6|^2 + |y2 - y6|^2) = 40767.6
d27 := sqrt(|x2 - x7|^2 + |y2 - y7|^2) = 13000
d28 := sqrt(|x2 - x8|^2 + |y2 - y8|^2) = 21800.2
d34 := sqrt(|x3 - x4|^2 + |y3 - y4|^2) = 41760.9
d35 := sqrt(|x3 - x5|^2 + |y3 - y5|^2) = 1188.49
d36 := sqrt(|x3 - x6|^2 + |y3 - y6|^2) = 55055.4
d37 := sqrt(|x3 - x7|^2 + |y3 - y7|^2) = 46930.7
d38 := sqrt(|x3 - x8|^2 + |y3 - y8|^2) = 38322.9
d45 := sqrt(|x4 - x5|^2 + |y4 - y5|^2) = 42930.3
d46 := sqrt(|x4 - x6|^2 + |y4 - y6|^2) = 77949.8
d47 := sqrt(|x4 - x7|^2 + |y4 - y7|^2) = 46779.2
d48 := sqrt(|x4 - x8|^2 + |y4 - y8|^2) = 45687.8
d56 := sqrt(|x5 - x6|^2 + |y5 - y6|^2) = 54528.4
d57 := sqrt(|x5 - x7|^2 + |y5 - y7|^2) = 47276.2
d58 := sqrt(|x5 - x8|^2 + |y5 - y8|^2) = 38549.8
d68 := sqrt(|x6 - x8|^2 + |y6 - y8|^2) = 33623
d67 := sqrt(|x6 - x7|^2 + |y6 - y7|^2) = 38204.7
d78 := sqrt(|x7 - x8|^2 + |y7 - y8|^2) = 9708.24
